# 《CBB024D环路计算-BOOST模式-恒压-PID补偿》
# 淘宝：文七电源
# 地址：https://shop274134110.taobao.com
# 说明：本设计书说明CBB024D工作于Boost模式下的，采用PID补偿的设计与计算过程
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# 宏定义：
# 定义单位：
V := 1
A := 1
W := 1
uH := 10^-6
uF := 10^-6
kHz := 10^3
mΩ := 10^-3
# 全局数量级宏定义：
k := 10^3
m := 10^-3
u := 10^-6
n := 10^-9
p := 10^-12
# 定义运行硬件和相关参数：
# 定义电路电感（在满载的时候，电感有一定衰减）：
L_BB := 15*uH
# 定义电感内阻为(预估)：：
R_L := 2*mΩ
# 定义输出滤波电容为：
C_out := 440*uF
# 定义输出滤波电容ESR电阻为(预估)：
R_Cout := 5*mΩ
# 定义工作输入电压/输出电压/输出电流（通常在满载的工作点补偿，然后验证其他工作点）：
V_in := 24*V
V_out := 48*V
I_out := 5*A
# 计算BOOST电路主功率传递函数
# BOOST占空比至输出电压的传递函数如下 | 淘宝：文七电源
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# （至于如何算的，可以参考boost小信号建模过程，工程应用可以不去管具体推到过程，站在巨人肩膀上直接应用就好）：
# 地址：https://shop274134110.taobao.com
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# 计算传递函数相关参数
D_Bo := V_in/V_out = 50 %
ω_0 := D_Bo/sqrt(L_BB*C_out) = 6154.57
ω_a := D_Bo^2*V_out/I_out/L_BB = 160000
ω_zc := 1/(R_Cout*C_out) = 454545
Q := 1/(ω_0*(L_BB/(D_Bo^2*(V_out/I_out)) + (R_Cout + R_L/D_Bo^2)*C_out)) = 13.574
# 定义分压电阻采样增益(输出差分电压采样电路)
G_div := 3.3*k/(68*k) = 0.0485294
# 定义ADC采样增益
G_sample := 1/3.3 = 0.30303
# 代入Boost传递函数
G_vd(f) :=
    s ← 2*π*f*1i
    A ← V_in/D_Bo^2*(1 - s/ω_a)*(1 + s/ω_zc)/(1 + s/(ω_0*Q) + s^2/ω_0^2)*(G_div*G_sample)
# 计算Boost传递函数增益：
GAIN_vd(f) := 20*log(|G_vd(f)|)
# 计算Boost传递函数相位：
Phase_vd(f) := arg(G_vd(f))*180/π
# 绘制BOOST传递函数增益曲线和相位曲线：
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# 增益曲线 | 相位曲线
# PID-补偿器设计：
# 定义补偿后开环BUCK的穿越频率为5kHz. | 淘宝：文七电源
f_Cross := 2*k
# 地址：https://shop274134110.taobao.com
# 从增益图中可以计算出对应的dB值：
Gain := GAIN_vd(f_Cross) = -7.00273
# 计算Gain增益对应实际放大倍数：
GAIN_s := 10^(Gain/20) = 0.446543
# 定义和两个零点(若补偿效果不佳可以适当调整位置）-BOOST的LC谐振频率位w0，使用两个零点补偿
f_z1 := 0.5*kHz
f_z2 := 0.5*kHz  # (若补偿效果不佳可以适当调整位置）
ω_z1 := 2*π*f_z1 = 3141.59
ω_z2 := 2*π*f_z2 = 3141.59
# 定义增益初始解（后续要根据穿越频率算实际的Ks）
K_s := 1000
G_PID(f) := K_s*(1 + 1j*2*π*f/ω_z1)*(1 + 1j*2*π*f/ω_z2)/(1j*2*π*f)
# 补偿器传递函数在穿越频率处的增益加上BOOST功率环路的增益为0，求解KS值
G_PID_S(K_s) := |K_s*(1 + 1j*2*π*f_Cross/ω_z1)*(1 + 1j*2*π*f_Cross/ω_z2)/(1j*2*π*f_Cross)| - 1/GAIN_s
K_sc := root(G_PID_S(K_s), K_s) = 1655.38
# 构建补偿器传递函数
G_PIDc(f) := K_sc*(1 + 1j*2*π*f/ω_z1)*(1 + 1j*2*π*f/ω_z2)/(1j*2*π*f)
# 计算补偿器的幅频特性曲线和相频特性
GAIN_PIDc(f) := 20*log(|G_PIDc(f)|)
PHASE_PIDc(f) := arg(G_PIDc(f))*180/π
# 绘制补偿器的幅频特性曲线和相频特性曲线
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# 增益曲线 | 相位曲线
# PID补偿效果计算：
# 绘制PID补偿后的BOOST的开环幅频特性曲线和相频特性曲线
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# 增益曲线 | 相位曲线
# 计算相位裕度
arg(G_vd(f_Cross)*G_PIDc(f_Cross))*180/π + 180 = 61.738
# 计算增益裕度
# PID的S域到Z域变换：
# 定义采样频率：
f_sample := 200*k
# 计算周期：
T_s := 1/f_sample = 5e-6
# 用补偿器传递函数如下：
G_PIDc(s) := K_sc*(1 + s/ω_z1)*(1 + s/ω_z2)/s = (K_sc + K_sc*(1/ω_z1 + 1/ω_z2)*s + K_sc/(ω_z1*ω_z2)*s^2)/s  # disabled
A_0 := K_sc = 1655.38
A_1 := K_sc*(1/ω_z1 + 1/ω_z2) = 1.05385
A_2 := K_sc/(ω_z1*ω_z2) = 0.000167725
# 则得到PID传递函数如下：
G_PIDc(s) := (A_0 + A_1*s + A_2*s^2)/s
# 利用一阶后向差分法计算参数,从S域到Z域，得到差分方程
s := (1 - z^-1)/T_s  # disabled
G_PIS(z) := (b_0*z^2 + b_1*z^1 + b_2)/(a_0*z^2 + a_1*z^1 + a_2)  # disabled
b_0 := A_0*T_s + A_1 + A_2/T_s = 34.6071
b_1 := -A_1 - 2*A_2/T_s = -68.1438
b_2 := A_2/T_s = 33.545
a_1 := -1
b_0 + b_1 + b_2 = 0.0082769
a_2 := 0
# 转换成MCU里面的数字量
BOOSTPIDb_0 := b_0*2^8 = 8859.42
BOOSTPIDb_1 := b_1*2^8 = -17444.8
BOOSTPIDb_2 := b_2*2^8 = 8587.52
# 得到MCU里面得差分方程如下
u(n) := a_1*u(n - 1) + a_2*u(n - 2) + b_0*err(n) + b_1*err(n - 1) + b_2*err(n - 2)  # disabled
