# 《CBB024D环路计算-BOOST模式-恒压-TYPE3补偿》
# 淘宝：文七电源
# 地址：https://shop274134110.taobao.com
# 说明：本设计书说明CBB024D工作于Boost模式下的，采用Type3型补偿的设计与计算过程（两个零点和两个极点）
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# 宏定义：
# 定义单位：
V := 1
A := 1
W := 1
uH := 10^-6
uF := 10^-6
kHz := 10^3
mΩ := 10^-3
# 全局数量级宏定义：
k := 10^3
m := 10^-3
u := 10^-6
n := 10^-9
p := 10^-12
# 定义运行硬件和相关参数：
# 定义电路电感：（在满载的时候，电感有一定衰减）
L_BB := 15*uH
# 定义电感内阻为(预估)：
R_L := 2*mΩ
# 定义输出滤波电容为：
C_out := 440*uF
# 定义输出滤波电容ESR电阻为(预估)：
R_Cout := 5*mΩ
# 定义工作输入电压/输出电压/输出电流：
V_in := 24*V
V_out := 48*V
I_out := 5*A
# 计算BOOST电路主功率传递函数
# BOOST占空比至输出电压的传递函数如下 | 淘宝：文七电源
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# （至于如何算的，可以参考boost小信号建模过程，工程应用可以不去管具体推到过程，站在巨人肩膀上直接应用就好）：
# 地址：https://shop274134110.taobao.com
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# 计算传递函数相关参数
D_Bo := V_in/V_out = 50 %
ω_0 := D_Bo/sqrt(L_BB*C_out) = 6154.57
ω_a := D_Bo^2*V_out/I_out/L_BB = 160000
ω_zc := 1/(R_Cout*C_out) = 454545
Q := 1/(ω_0*(L_BB/(D_Bo^2*(V_out/I_out)) + (R_Cout + R_L/D_Bo^2)*C_out)) = 13.574
# 定义分压电阻采样增益(输出差分电压采样电路)
G_div := 3.3*k/(68*k) = 0.0485294
# 定义ADC采样增益
G_sample := 1/3.3 = 0.30303
# 代入Boost传递函数
G_vd(f) :=
    s ← 2*π*f*1i
    A ← V_in/D_Bo^2*(1 - s/ω_a)*(1 + s/ω_zc)/(1 + s/(ω_0*Q) + s^2/ω_0^2)*(G_div*G_sample)
# 计算Boost传递函数增益：
GAIN_vd(f) := 20*log(|G_vd(f)|)
# 计算Boost传递函数相位：
Phase_vd(f) := arg(G_vd(f))*180/π
# 绘制Boost传递函数增益曲线和相位曲线
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# 增益曲线 | 相位曲线
# Type3-补偿器设计：
# 定义补偿后开环BUCK的穿越频率为5kHz.
# 淘宝：文七电源
f_Cross := 3*k
# 地址：https://shop274134110.taobao.com
# 从增益图中可以计算出对应的dB值：
Gain := GAIN_vd(f_Cross) = -15.4055
# 计算Gain增益对应实际放大倍数：
GAIN_s := 10^(Gain/20) = 0.169716
# 定义零点和极点的位置(若补偿效果不佳可以适当调整位置）-Boost的LC谐振频率位w0，使用零点补偿，极点补偿高频噪声抑制
# (若补偿效果不佳可以适当调整位置）
f_z1 := 500
f_z2 := 500
f_p1 := 50*kHz
f_p2 := 50*kHz
ω_z1 := 2*π*f_z1 = 3141.59
ω_z2 := 2*π*f_z2 = 3141.59
ω_p1 := 2*π*f_p1 = 314159
ω_p2 := 2*π*f_p2 = 314159
# 定义增益初始解（后续要根据穿越频率算实际的Ks）
K_s := 1000
G_TYPE3(f) := K_s*(1 + 1j*2*π*f/ω_z1)*(1 + 1j*2*π*f/ω_z2)/(1j*2*π*f*(1 + 1j*2*π*f/ω_p1)*(1 + 1j*2*π*f/ω_p2))
# 补偿器传递函数在穿越频率处的增益加上BOOST功率环路的增益为0，求解KS值
G_TYPE3_S(K_s) := |K_s*(1 + 1j*2*π*f_Cross/ω_z1)*(1 + 1j*2*π*f_Cross/ω_z2)/(1j*2*π*f_Cross*(1 + 1j*2*π*f_Cross/ω_p1)*(1 + 1j*2*π*f_Cross/ω_p2))| - 1/GAIN_s
K_sc := root(G_TYPE3_S(K_s), K_s) = 3012.57
# 构建补偿器传递函数
G_TYPE3c(f) := K_sc*(1 + 1j*2*π*f/ω_z1)*(1 + 1j*2*π*f/ω_z2)/(1j*2*π*f*(1 + 1j*2*π*f/ω_p1)*(1 + 1j*2*π*f/ω_p2))
# 计算补偿器的幅频特性曲线和相频特性
GAIN_TYPE3c(f) := 20*log(|G_TYPE3c(f)|)
PHASE_TYPE3c(f) := arg(G_TYPE3c(f))*180/π
# 绘制补偿器的幅频特性曲线和相频特性曲线
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# 增益曲线 | 相位曲线
# TYP3补偿效果计算：
# 绘制TYP3补偿后的bOOST的开环幅频特性曲线和相频特性曲线
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# 增益曲线 | 相位曲线
# 计算相位裕度
arg(G_vd(f_Cross)*G_TYPE3c(f_Cross))*180/π + 180 = 61.406
# 计算增益裕度
GAIN_vd(50*k) + GAIN_TYPE3c(50*k) = -23.1455
# TPYE3的S域到Z域变换：
# 定义采样频率： | 淘宝：文七电源
f_sample := 200*k  # 地址：https://shop274134110.taobao.com
# 计算周期：
T_s := 1/f_sample = 5e-6
# 用补偿器传递函数如下：
G_TYPE3c(s) := K_sc*(1 + s/ω_z1)*(1 + s/ω_z2)/(s*(1 + s/ω_p1)*(1 + s/ω_p2)) = (K_sc + K_sc*(1/ω_z1 + 1/ω_z2)*s + K_sc/ω_z1*1/ω_z2*s^2)/(s + (1/ω_p1 + 1/ω_p2)*s^2 + 1/ω_p1*1/ω_p2*s^3)  # disabled
# 利用双线性变换,从S域到Z域，得到差分方程
s := 2/T_s*((z - 1)/(z + 1))  # disabled
G_TYPE3(z) := (b_0*z^3 + b_1*z^2 + b_2*z + b_3)/(z^3 + a_1*z^2 + a_2*z + a_3)  # disabled
# 利计算过程复杂，使用matlab工具可快速计算得到相关系数
# 编写matlab的M文件
# L=15E-6;
# RL=2E-3;
# C=440E-6;
# RC=5E-3;
# Vin=24;
# Vout=48;
# Iout=5;
# R=Vout/Iout;
# Db=Vin/Vout;
# w0=Db/(sqrt(L*C));
# wa=Db^2*R/L;
# wzc=1/RC/C;
# Q=1/w0/(L/Db^2/R+(RC+RL/Db^2)*C);
# Gdiv=3.3/68;
# Gsample=1/3.3;
# s=tf('s');
# Gvd=Gdiv*Gsample*Vin*(1-s/wa)*(1+s/wzc)/Db^2/(1+s/Q/w0+s^2/w0^2)
# wz1=3.142E3;
# wz2=3.142E3;
# wp1=3.142E5;
# wp2=3.142E5;
# ks=3.013E3;
# Gc=ks*(1+s/wz1)*(1+s/wz2)/s/(1+s/wp1)/(1+s/wp2)
# sys=Gvd*Gc;
# w=logspace(1,7);
# p=bodeoptions;
# p.PhaseVisible='on';
# p.FreqUnits='Hz';
# margin(sys);
# grid on;
# ts=5e-6;
# dsys=c2d(Gc,ts,'tustin')
# 得到传递函数和Z变化方程：
# Gc =
# 2.974e14 s^2 + 1.869e18 s + 2.936e21
# ----------------------------------------
# 9.872e06 s^3 + 6.204e12 s^2 + 9.746e17 s
#
# dsys =
# 24 z^3 - 23.25 z^2 - 23.99 z + 23.26
# ------------------------------------
# z^3 - 1.24 z^2 + 0.2547 z - 0.01443
# 得赋值相关参数：
b_0 := 24
b_1 := -23.25
b_2 := -23.99
b_3 := 23.26
b_0 + b_1 + b_2 + b_3 = 0.02
a_1 := -1.24
a_2 := 0.2547
a_3 := -0.01443
a_1 + a_2 + a_3 = -0.99973
# 得到MCU里面参数的数字量
TYPE3b_0 := round(b_0*2^8) = 6144
TYPE3b_1 := round(b_1*2^8) = -5952
TYPE3b_2 := round(b_2*2^8) = -6141
TYPE3b_3 := round(b_3*2^8) = 5955
TYPE3a_1 := a_1*2^12 = -5079.04
TYPE3a_2 := a_2*2^12 = 1043.25
TYPE3a_3 := a_3*2^12 = -59.1053
# 得到MCU里面得差分方程如下
u(n) := -a_1*u(n - 1) - a_2*u(n - 2) - a_3*u(n - 3) + (b_0*err(n) + b_1*err(n - 1) + b2*err(n - 2) + b3*err(n - 3))  # disabled
-5080 + 1043 - 59 = -4096
4092 - 3809 = 283
