# 《CBB024D环路计算-BUCK模式-恒压-PID补偿》
# 淘宝：文七电源
# 地址：https://shop274134110.taobao.com
# 说明：本设计书说明CBB工作于BUCK模式下的，采用PID补偿的设计与计算过程
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# 宏定义：
# 定义单位：
V := 1
A := 1
W := 1
uH := 10^-6
uF := 10^-6
kHz := 10^3
mΩ := 10^-3
# 全局数量级宏定义：
k := 10^3
m := 10^-3
u := 10^-6
n := 10^-9
p := 10^-12
# 定义运行硬件和相关参数：
# 定义BUCK电感：（在满载的时候，电感有一定衰减）
L_BB := 15*uH
# 定义BUCK电感内阻为(预估)：
R_L := 2*mΩ
# 定义BUCK输出滤波电容为：
C_out := 440*uF
# 定义BUCK输出滤波电容ESR电阻为(预估)：
R_Cout := 5*mΩ
# 定义BUCK工作输入电压/输出电压/输出电流（通常在满载的工作点补偿，然后验证其他工作点）：
V_in := 48*V
V_out := 40*V
I_out := 5*A
# 计算BUCK电路主功率传递函数
# BUCK占空比至输出电压的传递函数如下 | 淘宝：文七电源
# （至于如何算的，可以参考BUCK小信号建模，工程应用可以不去管具体推到过程，站在巨人肩膀上直接应用就好）： | 地址：https://shop274134110.taobao.com
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# 计算传递函数相关参数
ω0 := 1/sqrt(L_BB*C_out) = 12309.1
ωzL := R_L/L_BB = 133.333
ωzc := 1/(R_Cout*C_out) = 454545
Q(V_out, I_out) := 1/(ω0*(L_BB/(V_out/I_out) + (R_L + R_Cout)*C_out))
# 定义分压电阻采样增益(输出差分电压采样电路)
G_div := 3.3*k/(68*k) = 0.0485294
# 定义ADC采样增益
G_sample := 1/3.3 = 0.30303
# 代入BUCK传递函数
G_vd(f) :=
    s ← 2*π*f*1i
    A ← V_in*(1 + s/ωzc)/(1 + s/(Q(V_out, I_out)*ω0) + s^2/ω0^2)*G_div*G_sample
# 计算BUCK传递函数增益：
GAIN_vd(f) := 20*log(|G_vd(f)|)
# 计算BUCK传递函数相位：
Phase_vd(f) := arg(G_vd(f))*180/π
# 绘制BUCK传递函数增益曲线和相位曲线：
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# 增益曲线 | 相位曲线
# PID-补偿器设计：
# 定义补偿后开环BUCK的穿越频率为5kHz.
f_Cross := 3*k
# 淘宝：文七电源
# 地址：https://shop274134110.taobao.com
# 从增益图中可以计算出对应的dB值：
Gain := GAIN_vd(f_Cross) = -5.61335
# 计算Gain增益对应实际放大倍数：
GAIN_s := 10^(Gain/20) = 0.524002
# 定义和两个零点(若补偿效果不佳可以适当调整位置）-BUCK的LC谐振频率位w0，使用两个零点补偿
f_z1 := 0.5*kHz
f_z2 := 0.5*kHz  # (若补偿效果不佳可以适当调整位置）
ω_z1 := 2*π*f_z1 = 3141.59
ω_z2 := 2*π*f_z2 = 3141.59
# 定义增益初始解（后续要根据穿越频率算实际的Ks）
K_s := 1000
G_PID(f) := K_s*(1 + 1j*2*π*f/ω_z1)*(1 + 1j*2*π*f/ω_z2)/(1j*2*π*f)
# 补偿器传递函数在穿越频率处的增益加上BUCK功率环路的增益为0，求解KS值
G_PID_S(K_s) := |K_s*(1 + 1j*2*π*f_Cross/ω_z1)*(1 + 1j*2*π*f_Cross/ω_z2)/(1j*2*π*f_Cross)| - 1/GAIN_s
K_sc := root(G_PID_S(K_s), K_s) = 972.225
# 构建补偿器传递函数
G_PIDc(f) := K_sc*(1 + 1j*2*π*f/ω_z1)*(1 + 1j*2*π*f/ω_z2)/(1j*2*π*f)
# 计算补偿器的幅频特性曲线和相频特性
GAIN_PIDc(f) := 20*log(|G_PIDc(f)|)
PHASE_PIDc(f) := arg(G_PIDc(f))*180/π
# 绘制补偿器的幅频特性曲线和相频特性曲线
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# 增益曲线 | 相位曲线
# PID补偿效果计算：
# 绘制PID补偿后的BUCK的开环幅频特性曲线和相频特性曲线
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# 增益曲线 | 相位曲线
# 计算相位裕度
(Phase_vd(f_Cross) + PHASE_PIDc(f_Cross)) + 180 = 77.4223
# 计算增益裕度
GAIN_vd(1000*k) + GAIN_PIDc(1000*k) = -32.6757
# PID的S域到Z域变换：
# 定义采样频率：
f_sample := 200*k
# 计算周期：
T_s := 1/f_sample = 5e-6
# 用补偿器传递函数如下：
G_PIDc(s) := K_sc*(1 + s/ω_z1)*(1 + s/ω_z2)/s = (K_sc + K_sc*(1/ω_z1 + 1/ω_z2)*s + K_sc/(ω_z1*ω_z2)*s^2)/s  # disabled
A_0 := K_sc = 972.225
A_1 := K_sc*(1/ω_z1 + 1/ω_z2) = 0.618937
A_2 := K_sc/(ω_z1*ω_z2) = 9.8507e-5
# 则得到PID传递函数如下：
G_PIDc(s) := (A_0 + A_1*s + A_2*s^2)/s
# 利用一阶后向差分法计算参数,从S域到Z域，得到差分方程
s := (1 - z^-1)/T_s  # disabled
G_PIS(z) := (b_0*z^2 + b_1*z^1 + b_2)/(z^2 + a_1*z^1 + a_2)  # disabled
b_0 := A_0*T_s + A_1 + A_2/T_s = 20.3252
b_1 := -A_1 - 2*A_2/T_s = -40.0217
b_2 := A_2/T_s = 19.7014
a_1 := -1
a_2 := 0
# 得到MCU里面参数的数字量
PIDb0 := b_0*2^8 = 5203.25
PIDb1 := b_1*2^8 = -10245.6
PIDb2 := b_2*2^8 = 5043.56
# 得到MCU里面得差分方程如下
u(n) := a_1*u(n - 1) + a_2*u(n - 2) + b_0*err(n) + b_1*err(n - 1) + b_2*err(n - 2)  # disabled
