# 《CBB024D主功率硬件计算》
# 淘宝：文七电源
# 地址：https://shop274134110.taobao.com
# 说明：本设计书说明CBB012D计算过程，包含器件选型计算，应力计算，波形计算等
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# 定义全局单位变量
p := 10^-12
n := 10^-9
u := 10^-6
m := 10^-3
k := 10^3
V := 1
A := 1
uH := 10^-6
uF := 10^-6
# 一、BUCK-BOOST运行相关参数定义：
# 1.输入输出参数规格定义：
# 定义输入电压：
V_in_nom := 24*V
V_in_max := 48*V
V_in_min := 12*V
# 定义输出电压：
V_out_nom := 24*V
V_out_max := 48
V_out_min := 5*V
# 定义额定电流与最大输出电流：
I_out_nom := 5*A
I_out_max := 5*A
# 2.定义运行参数：
# 定义工作频率：
f_switch := 200*k
# 二、BUCK-BOOST电感计算：
# 1.BUCK模式下，输入最大输出最小，计算最小占空比： | 淘宝：文七电源
# 地址：https://shop274134110.taobao.com
D_min := V_out_min/V_in_max = 10.4167 %
# 2.BUCK模式下，定义电感电流波动量(25%的最大额定电流脉动)：
ΔI_L := 25 %*I_out_nom = 1.25 A
# 3.BUCK模式下，计算最小需要的BUCK电感：
L_minBuck := V_out_min/(ΔI_L*f_switch)*(1 - D_min) = 17.9167 uH
# 4.Boost模式下，输入额定输出最大时占空比：
D_Bo := 1 - V_in_nom/V_out_max = 50 %
# 5.Boost模式下，取1A时Boost进入连续模式计算电感：
I_minb := 1*A
L_minBoost := V_out_max*D_Bo*(1 - D_Bo)^2/(2*I_minb*f_switch) = 15 uH
# 6.综合上述计算结果，留有一定余量取BUCK-BOOST电感：
L_BB := 22*uH
# 按照公式计算结果，是保证纹波电流能满足前面设定值的最小电感值，所以选择电感量高于该计算结果的电感就可以。此外，还要考虑电感的饱和电流要大于峰值电流，峰值电流计算如下；由于本文档的计算没有考虑效率，所以占空比和峰值电流要比实际值小，因此在选择时要留有一定的裕量。
# 三、BUCK-BOOST输出电容计算：
# 1.定义输出纹波电压：
ΔV_out := 0.05*V
# 2.BUCK模式下,计算输出电容
C_minBuck := V_out_min*(1 - V_out_min/V_in_max)/(8*L_BB*ΔV_out*f_switch^2) = 12.7249 uF
# 3.Boost模式下,计算输出电容
C_minBoost := I_out_nom*(1 - V_in_min/V_out_max)/(ΔV_out*f_switch) = 375 uF
# 选两颗220uF的电容作为总输出电压：
C_BB := 440*uH
# 四、BUCK模式下计算：
# 1.根据输入输出电压计算占空比： | 淘宝：文七电源
# 地址：https://shop274134110.taobao.com
D(v_in, v_out) := v_out/v_in
# 2.计算导通时间
T_on(v_in, v_out) := D(v_in, v_out)*1/f_switch
# 3.计算电感电流波动量
Δi(v_in, v_out) := (v_in - v_out)/L_BB*T_on(v_in, v_out)
# 4.构建BUCK的电感电流计算函数：
i_L(v_in, v_out, i_o, t) :=
    i_o - 1/2*Δi(v_in, v_out) + (v_in - v_out)/L_BB*mod(t, 1/f_switch) if 0 ≤ mod(t, 1/f_switch) < T_on(v_in, v_out)
    i_o + 1/2*Δi(v_in, v_out) - v_out/L_BB*(mod(t, 1/f_switch) - T_on(v_in, v_out)) if T_on(v_in, v_out) ≤ mod(t, 1/f_switch) < 1/f_switch
# 5.绘制BUCK工作电感电流波形
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# 6.构建输入MOS的电流计算函数：
i_mos_up(v_in, v_out, i_o, t) :=
    i_o - 1/2*Δi(v_in, v_out) + (v_in - v_out)/L_BB*mod(t, 1/f_switch) if 0 ≤ mod(t, 1/f_switch) < T_on(v_in, v_out)
    0 if T_on(v_in, v_out) ≤ mod(t, 1/f_switch) < 1/f_switch
# 7.绘制输入MOS电流波形
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# 8.构建续流MOS的电流计算函数：
i_mos_down(v_in, v_out, i_o, t) :=
    0 if 0 ≤ mod(t, 1/f_switch) < T_on(v_in, v_out)
    i_o + 1/2*Δi(v_in, v_out) - v_out/L_BB*(mod(t, 1/f_switch) - T_on(v_in, v_out)) if T_on(v_in, v_out) ≤ mod(t, 1/f_switch) < 1/f_switch
# 9.绘制输入续流MO电流波形
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# 10.计算电感电流有效值
i_L_rms := sqrt(f_switch*integral(i_L(V_in_max, V_out_nom, I_out_nom, t)^2, t = 0 .. 1/f_switch)) = 5.0616 A
# 11.计算输入MOS电流有效值
i_mos_up_rms := sqrt(f_switch*integral(i_mos_up(V_in_max, V_out_nom, I_out_nom, t)^2, t = 0 .. 1/f_switch)) = 3.57909 A
# 12.计算续流MOS电流有效值
i_mos_down_rms := sqrt(f_switch*integral(i_mos_down(V_in_max, V_out_nom, I_out_nom, t)^2, t = 0 .. 1/f_switch)) = 3.57909 A
# 13.构建输出电容计算函数：
Δi_c(v_in, v_out, i_o, t) := i_L(v_in, v_out, i_o, t) - i_o
# 14.绘制输出电容电流波形：
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# 五、BOOST模式下计算：
# 1.根据输入输出电压计算占空比： | 淘宝：文七电源
# 地址：https://shop274134110.taobao.com
D1(v_in, v_out) := 1 - v_in/v_out
# 2.计算导通时间
T1_on(v_in, v_out) := D1(v_in, v_out)*1/f_switch
# 3.计算电感电流波动量
Δi(v_in, v_out) := v_in/L_BB*T1_on(v_in, v_out)
# 4.构建BOOST的电感电流计算函数：
i1_L(v_in, v_out, i_o, t) :=
    i_o - 1/2*Δi(v_in, v_out) + v_in/L_BB*mod(t, 1/f_switch) if 0 ≤ mod(t, 1/f_switch) < T1_on(v_in, v_out)
    i_o + 1/2*Δi(v_in, v_out) - (v_out - v_in)/L_BB*(mod(t, 1/f_switch) - T1_on(v_in, v_out)) if T1_on(v_in, v_out) ≤ mod(t, 1/f_switch) < 1/f_switch
# 5.绘制BOOST工作电感电流波形
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# 6.构建续流MOS的电流计算函数：
i1_mos_up(v_in, v_out, i_o, t) :=
    0 if 0 ≤ mod(t, 1/f_switch) < T1_on(v_in, v_out)
    i_o + 1/2*Δi(v_in, v_out) - (v_out - v_in)/L_BB*(mod(t, 1/f_switch) - T1_on(v_in, v_out)) if T1_on(v_in, v_out) ≤ mod(t, 1/f_switch) < 1/f_switch
# 7.绘制续流MOS电流波形
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# 8.构建充电MOS的电流计算函数：
i1_mos_down(v_in, v_out, i_o, t) :=
    i_o - 1/2*Δi(v_in, v_out) + v_in/L_BB*mod(t, 1/f_switch) if 0 ≤ mod(t, 1/f_switch) < T1_on(v_in, v_out)
    0 if T1_on(v_in, v_out) ≤ mod(t, 1/f_switch) < 1/f_switch
# 9.绘制充电续流MOS电流波形
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# 10.计算电感电流有效值
i1_L_rms := sqrt(f_switch*integral(i1_L(V_in_nom, V_out_max, I_out_nom, t)^2, t = 0 .. 1/f_switch)) = 5.0616 A
# 11.计算续流MOS电流有效值
i1_mos_up_rms := sqrt(f_switch*integral(i1_mos_up(V_in_nom, V_out_max, I_out_nom, t)^2, t = 0 .. 1/f_switch)) = 3.57909 A
# 12.计算充电MOS电流有效值
i1_mos_down_rms := sqrt(f_switch*integral(i1_mos_down(V_in_nom, V_out_max, I_out_nom, t)^2, t = 0 .. 1/f_switch)) = 3.57909 A
# 13.构建输出电容计算函数：
Δi1_c(v_in, v_out, i_o, t) := i1_L(v_in, v_out, i_o, t) - i_o
# 14.绘制输出电容电流波形：
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# 六、MOS选型计算：
# 1.按照上述计算，取MOS电流最大值：
i_mos_peak := 6.5*A
# 2.计算输入mos电流的有效值：
i_mos_rms := 3.579*A
# Mos选型的额定电流值需按流过MOS最大电流的2倍余量以上（防止短路或故障下电流过大冲击损坏）
i_mos_rms*2 = 7.158 A
# 3.Mos选型的额定耐压值需大于最大电压输入时的耐压值1.25倍余量（防止尖峰击穿）
V_in_max*1.25 = 60 V
# 根据上述计算，可以选取额定电流大于10A，且耐压值100V的MOS,下管mos选型和上管一样
# 考虑到自然冷的情况，为尽量降低导通损耗和开关损耗，应用时选择导通内阻尽量小，且Coss较小的MOS
