# 《CBB024D源代码计算书》
# 淘宝：文七电源
# 地址：https://shop598739109.taobao.com
# 说明：本设计书说明CBB0242D软件参数计算（不含环路计算，环路计算请参照环路设计文档）
# 宏定义：
# 定义单位：
V := 1
A := 1
W := 1
kW := 10^3
uH := 10^-6
nF := 10^-9
kHz := 10^3
mH := 10^-3
# 全局数量级宏定义：
k := 10^3
m := 10^-3
u := 10^-6
n := 10^-9
p := 10^-12
M := 10^6
Q8 := 2^8
Q10 := 2^10
Q12 := 2^12
Q15 := 2^15
# 最小占空比和最大占空比数字量：
# 定义BCUK占空比的最小值与最大值（按百分比）：
Duty_min := 7 %
Duty_max := 93 %
# 取Q12数字量对应100%，则最小与最大占空比的数字量为
DSPDuty_min := Duty_min*Q12 = 286.72
DSPDuty_max := Duty_max*Q12 = 3809.28
# 环路积分量饱和值定义为占空比数字量的Q15倍
MIN_INTE := DSPDuty_min*Q15 = 9395241
MAX_INTE := DSPDuty_max*Q15 = 124822487
# 输入电压电流采样计算：
# 差分电压采样电阻：
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R_22 := 68*k
R_20 := 3.3*k
# 差分电流采样电阻： | 定义偏置电压：
R_7 := 1*m
V_REF := 1.65*V
R30 := 15*k
MCUV_REF := V_REF/3.3*Q12 = 2048
R_32 := 100
# 计算差分电压采样放大倍数：
K_V := R_20/R_22 = 0.0485294
# 计算差分电流采样放大倍数：
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K_I := R30/R_32*R_7 = 0.15
# 控制器最大采样值为3.3V，计算能采样最大电压和最大电流值：
V_Smax := 3.3/K_V = 68 V
# 控制器采样后减去电流固有偏置1.65V，同样以3.3V最大值定义最大电流：
I_Smax := 3.3/K_I = 22 A
# 控制器采样最大值采用Q12标定（12位的ADC），计算*V电压与*A电流对应数字量：
DSPV := 24*V/V_Smax*Q12 = 1445.65
200/10240*4096 = 80
DSPI := 5*K_I/3.3*Q12 = 930.909
# 电源反向工作时，电流反流*A电流对应数字量：
DSPI_R := (Q12/2 - 5*K_I/3.3*Q12) = 1117.09
# 输出电压电流采样计算：
# 差分电压采样电阻：
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R_23 := 68*k
R_21 := 3.3*k
# 差分电流采样电阻：
R_8 := 1*m
R31 := 15*k
R_33 := 100
# 计算差分电压采样放大倍数：
K_V1 := R_21/R_23 = 0.0485294
# 计算差分电流采样放大倍数：
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K_I1 := R31/R_33*R_8 = 0.15
# 控制器最大采样值为3.3V，计算能采样最大电压和最大电流值：
V_Smax1 := 3.3/K_V1 = 68 V
# 控制器采样后减去电流固有偏置1.65V，同样以3.3V最大值定义最大电流：
I_Smax1 := 3.3/K_I1 = 22 A
# 控制器采样最大值采用Q12标定（12位的ADC），计算*V电压与*A电流对应数字量：
DSPV1 := 12*V/V_Smax1*Q12 = 722.824
DSPI1 := 5*K_I1/3.3*Q12 = 930.909
# 电源反向工作时，电流反流*A电流对应数字量：
DSPI1_R := (Q12/2 - 7.5*K_I1/3.3*Q12) = 651.636
# 输出短路保护计算：
# 定义额定电流位5A,最大输出电压位48V
I_nom := 5*A
V_outmax := 48*V
# 定义短路电压判据为10%最大电压，电流判据为150%限流值
V_short := V_outmax*10*% = 4.8 V
I_short := I_nom*150*% = 7.5 A
# 计算判据数字量
DSPV_short := V_short/V_Smax1*Q12 = 289.129
DSPI_short := I_short*K_I/3.3*Q12 = 1396.36
# 输出软件过流保护OCP：
# 定义最大电流的120%过流保护点：
I_OCP := I_nom*A*120*% = 6 A
# 计算过流保护点数字量：
MCUI_OCP := I_OCP*K_I/3.3*Q12 = 1117.09
# 输出软件过压保护OVP：
# 定义最大电压的110%过压保护点：
V_OVP := V_outmax*110*% = 52.8 V
# 计算过流保护点数字量：
DSPV_OVP := V_OVP/V_Smax1*Q12 = 3180.42
# 输入软件欠压保护UVP：
# 定义最小输入电压12V：
V_inmin := 12*V
# 定义最小电压的95%欠压保护点：
V_UVP := V_inmin*95*% = 11.4 V
# 计算欠压保护点数字量：
DSPV_UVP := V_UVP/V_Smax*Q12 = 686.682
# 定义最小电压的110%欠压保护恢复点：(滞环，防止保护来回动作)
V_UVP_RE := V_inmin*110*% = 13.2 V
# 计算欠压恢复点数字量：
DSPV_UVP_RE := V_UVP_RE/V_Smax*Q12 = 795.106
# 输出参考电压限流值数字量：
# 设计通过滑动电位器调整模块输出电压，
# 定义最大输出电压为48V,留0.5V余量
MAX_VREF := (48*V + 0.5)/V_Smax1*Q12 = 2921.41
# 定义最小输出电压为5V,留0.5V余量
MIN_VREF := (5*V - 0.5)/V_Smax1*Q12 = 271.059
# 定义限流值为6.2A
ILIMIT := 6.2*K_I/3.3*Q12 = 1154.33
