# 《12V5A单端反激硬件计算》
# 淘宝：文七电源
# 地址：https://shop274134110.taobao.com
# 说明：本设计书说明12V5A反激电路计算过程，包含器件选型计算，应力计算等
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# 定义全局单位变量
p := 10^-12
n := 10^-9
u := 10^-6
m := 10^-3
k := 10^3
V := 1
A := 1
uH := 10^-6
uF := 10^-6
# 一、反激运行相关参数定义：
# 定义输入电压：
V_acmin := 85
V_acnom := 220
V_acmax := 265
# AC市电经过整理滤波后的电压，作为反激电源直流输入
V_busmin := sqrt(2)*V_acmin = 120.208
V_busnom := sqrt(2)*V_acnom = 311.127
V_busmax := sqrt(2)*V_acmax = 374.767
# 电网的工作频率为：
f_L := 50
# 定义输出电压电流参数（其中Vout1/Iout1通常为辅助供电绕组的电压电流）：
V_out := 12
I_out := 5
V_out1 := 15
I_out1 := 0.02
# 定义反激MOS开关管工作频率
f_s := 100*k
# 二、单相桥式整流滤波电路计算：
# 留有一定余量，取输入最低电压为110V设计反激
V_busms := 110
# 整流桥体内二极管交替工作，即当一对工作时，另一对截止，截止时两端电压为输入电压，当输入电网电压最高时，整流桥承受最大的耐压，取1.5倍余量，则选用的整流桥耐压需满足：
K_bri := 1.5
V_busmax*K_bri = 562.15 V
# 计算输出功率（忽略辅助绕组）
P_out := V_out*I_out = 60
# 假设反激电源工作效率为80%，计算原边输入功率
η := 80 %
P_in := P_out/η = 75
# 当输入电压最低，且输出满功率时，此时流过整流桥的电流最大，此时流过整流桥每个二极管的电流平均值为：
I_inmax := P_in/(V_acmin*2) = 0.441176 A
# 其中，2表示整流桥是交替工作的，留1.5倍余量计算选取整流桥电流
IK_bri := 1.5
I_inmax*IK_bri = 0.661765 A
# 假设整流桥的二极管的道荣压降为1V，则整流桥的损耗计算为：
V_bri := 1*V
P_bri := 2*V_bri*I_inmax = 0.882353
# 根据上述计算选用的整流桥型号为KBL606，其额定工作电压为600V，额定电流为6A，完全满足设计要求
# 留有一定余量，取输入最低电压为110V设计反激
t_c := 0.008
C_in := 2*P_out*(1/(2*f_L) - t_c)/(η*(2*V_acmin^2 - V_busms^2)) = 127.66 uF
# 三、变压器计算：
# 定义反激变压器初级绕组的感应电压为100V
V_OR := 100
# 定义原边MOS开通后源漏极压降为
V_ds := 4
# 计算最大占空比为:
D_max := V_OR/(V_OR + V_busms - V_ds) = 0.485437
# 计算满载情况下的输入平均电流
I_avg := P_in/V_busms = 0.681818
# 脉动系数
K_RP := 0.8
# 反激初级绕组的峰值电流
I_p := I_avg/((1 - 0.5*K_RP)*D_max) = 2.34091
(I_R*DT*1/2 + (I_P - I_R)*DT)/T = I_avg  # disabled
# 脉动电流
I_R := K_RP*I_p = 1.87273
I_P*D - 1/2*I_R*D = I_avg  # disabled
# 初级有效值电流
I_prms := I_p*sqrt(D_max*(K_RP^2/3 - K_RP + 1)) = 1.04858
I_P*D - 1/2*(K_RP*I_p)*D = I_avg  # disabled
# 变压器初级侧激磁电感
I_P := I_avg/((1 - 1/2*K_RP)*D_max) = 2.34091
L_p := P_out/(I_p^2*K_RP*(1 - 0.5*K_RP)*f_s)*(0.5*(1 - η) + η)/η = 256.622 uH
# 算出变压器原副变比
V_dio := 0.7
N_ps := D_max/(1 - D_max)*(V_busms - V_ds)/(V_out + V_dio) = 7.87402
# 取反激变压器
(V_busms - V_ds)*D_max*T/N_p = (V_out + V_dio)*(1 - D_max)*T/N_s  # disabled
B_w := 0.2
K_o := 0.4
K_j := 3.95
# 计算所需磁芯的最小A_P值
A_p := (L_p*I_p^2*10^2/(B_w*K_o*K_j))^1.14 = 0.397327
# 选择为PQ2625的磁芯设计变压器
A_e := 118*u
B_max := 0.15
# 计算变压器初级匝数
N_p := round(V_busms*D_max/(A_e*B_max*f_s)) = 30
NBS := VT  # disabled
# 计算副边匝数
N_s := round(N_p*1/N_ps) = 4
# 计算得到辅助供电绕组的匝数
N_s1 := round(N_s*V_out1/V_out) = 5
# 趋肤深度
D_m := 2*66.1*10^-3/sqrt(f_s) = 0.418053 m
# 原边绕组选用的绕线直径D_p和股数P_p
D_p := 0.3*m
P_p := 3
# 原边绕组的电流密度
j_p := I_prms/((D_p/2)^2*π*P_p) = 4944786
# 计算得到反激电路变压器副边绕组电流的峰值
I_sp := I_p*N_p/N_s = 17.5568
# 计算变压器副边绕制电流的有效值
I_srms := I_sp*sqrt((1 - D_max)*(K_RP^2/3 - K_RP + 1)) = 8.09684
# 变压器副绕组选用的绕线直径D_s和股数P_s
D_s := 0.4*m
P_s := 11
# 计算得到变压器副边绕组的电流密度
j_s := I_srms/((D_s/2)^2*π*P_s) = 5857507
# 计算所有绕组截面积占变压器窗口得系数
A_w := 84.5*u
K_w := ((D_s/2)^2*π*P_s*N_s + (D_p/2)^2*π*P_p*N_p)/A_w = 0.140721
# 四、MOS选型计算：
# 平台电压
V_mos := (V_out + V_dio)*N_p/N_s + V_busmax = 470.017
# MOS的耐压能力必须满足
K_vmos := 1.5
K_vmos*V_mos = 705.025
# 五、二极管选型计算：
# 计算二极管截至时承受得电压为
V_diomax := V_out + V_busmax*N_s/N_p = 61.9689
K_vdio := 1.5
# 二极管的耐压能力必须满足
K_vdio*V_diomax = 92.9533
# 反激辅助供电绕组二极管在截至时所承受的电压
V_diomax1 := V_out1 + V_busmax*N_s1/N_p = 77.4611
# 选型的辅助绕组二极管的耐压能力最小值为
K_vdio1 := 1.3
K_vdio1*V_diomax1 = 100.699
# 六、输出电容计算：
# 输出纹波电压
V_c := 0.1
# 反激的输出负载电阻
R_out := V_out/I_out = 2.4
# 输出电容容量约为
C_o := V_out/(R_out*V_c)*D_max/f_s = 242.718 u
# 七、RCD计算：
# 假设变压器的漏感控制在1%以内：
L_k := 1 %*L_p = 2.56622 uH
# 假设电容的充电时间很短可忽略不计，电容的放电是线性的且
# 已知开关管的最大电压Vds为
V_dsmax := 800*V
# 希望电容上的钳位电压(经验值)：
V_clamp := 0.8*V_dsmax - V_busmax = 265.233 V
P_clamp := 1/2*f_s*L_k*I_p^2*(1 + V_OR/(V_clamp - V_OR)) = 1.12866
# 根据常规公式计算吸收电阻：
R_c := 2*(V_clamp - N_p/N_s*(V_out + V_dio))*V_clamp/(L_k*I_p^2*f_s) = 64.1213 k
# 根据常规公式计算电容：
C_c := V_clamp/(R_c*0.5*V_clamp*f_s) = 0.311909 n
# 八、电流取样电阻计算：
# 内部峰值电流保护点1V
V_pro := 1*V
# 取样电阻
R_s := V_pro*0.5/I_p = 0.213592
# 九、环路补偿计算：
# 相关参数
D_max = 0.485437
R_sc := 0.2
R_esr := 5*m
C_outc := 4*470*u
A_k := 1/3
ω_z := 1/(R_esr*C_outc) = 106383
ω_rz := (1 - D_max)^2*R_out/((N_s/N_p)^2*L_p*D_max) = 286936
ω_p := (1 + D_max)/(C_outc*R_out) = 329.219
# 从峰值电流参考值Vfb(t)到输出vo(t)的传递函数为：
G_vc(s) := A_k*R_out*N_ps*(1 - D_max)*(1 + s/ω_z)*(1 - s/ω_rz)/((1 + D_max)*R_sc*(1 + s/ω_p))
# 配置环路参数如下
C_2 := 10*n
R_17 := 1*k
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R_9 := 1*k
# 电压环从输入到输出的传递函数
G_vp(s) := R_9/(R_17*(1 + s*R_9*C_2))
# TL431对应R端口电压为
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V_ref := 2.5
# 初步设定R10
R_10 := 20*k
# 根据R10，与R16和RP1的分压后的电压等于2.5V
R_16_RP1 := V_ref/V_out*R_10/(1 - V_ref/V_out) = 5.26316 k
# 可选定R16电阻为5.1kΩ
R_16 := 5.1*k
R_P1 := R_16_RP1 - R_16 = 163.158
# 而光耦原边二极管导通时的电压为1.2V
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# 通常设定TL431工作的电流最小值1mA
V_f := 1.2
I_bias := 1.2*m
# 即可计算得到R11电阻取值最大值为
R_11 := V_f/I_bias = 1 k
# 预设光耦三极管的下拉电阻，和TL431反馈电容为
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R_14 := 10*k
C_3 := 100*n
CTR_min := 0.5
# 将上述所有参数代入G_ot (s)传递函数中得到
G_ot(s) := R_14*CTR_min/R_8*((1 + s*R_10*C_3)/(s*R_10*C_3))  # disabled
# 穿越频率为10kHz
f_c := 10*k
GAIN_s := 10^((20*log(|G_vc(1j*2*π*f_c)|))/20) = 0.0679656
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# 为了保证闭环传递函数在穿越频率f_c的增益为1，对应的dB值为零
G_otp(R_cal) := |G_vp(1j*2*π*f_c)*(R_14*CTR_min/R_cal*((1 + 1j*2*π*f_c*R_10*C_3)/(1j*2*π*f_c*R_10*C_3)))| - 1/GAIN_s
# 求解上述方程得到
R_cal_c := 100
R_8 := root(G_otp(R_cal_c), R_cal_c) = 287.753
