# 《LLC 主功率参数计算》
# By淘宝：文七电源
# 地址：https://shop227154945.taobao.com
# 说明：本设计书说明LPD04810电源LLC主功率硬件计算
# 一、LLC参数定义与计算：
# 1.LLC参数输入输出规格定义：
# 定义输入电压：
V_bus := 380 V
## :
# 定义输出电压：
V_oNom := 40 V
V_oMax := 48 V
V_oMin := 24 V
# 定义额定输出功率和额定输出电流：
P_outMax := 500 W
I_out := 10 A
# 2.谐振频率定义：
# 谐振工作频率：
f_r := 50 kHz
# 谐振工最低频率和最高频率：
f_rMin := 35 kHz
f_rMax := 150 kHz
# 3.计算变压器原副变比Nps：
# 定义二极管管压降电压和副边线路上压降之和：
V_DF := 1.5 V
N_ps := V_bus/(V_oNom + V_DF) = 9.15663
# 4.计算LLC增益曲线：
# 计算LLC增益函数：
M(λ, Q, f_n) := 1/sqrt((1 + 1/λ*(1 - 1/f_n^2))^2 + (Q*(f_n - 1/f_n))^2)
# 计算LLC增益曲线（不同的λ值与不同的Q值在不同频率下的增益曲线）：
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# 选取合适增益范围的曲线：
λ_c := 3.5
Q_c := 0.6
# 计算LLC增益曲线（满载电流情况下输出电压最高和最低）：
M(λ_c, Q_c, f_rMin/f_r)*V_bus/N_ps = 50.1504 V
M(λ_c, Q_c, f_rMax/f_r)*V_bus/N_ps = 20.4148 V
# 5.等效负载计算（额定输出功率额定输出电压下）：
R_Ld := V_oNom/I_out = 4 Ω
P_oNom := V_oNom*I_out = 400 W
# 等效内部电阻：
R_eq := 8*N_ps^2/π^2*R_Ld = 271.845 Ω
# 6.计算LLC谐振参数：
# 计算谐振电容：
C_r := 1/(2*π*Q_c*f_r*R_eq) = 19.5154 nF
# 计算谐振电感：
L_r := 1/((2*π*f_r)^2*C_r) = 0.519186 mH
# 计算激磁电感：
L_m := λ_c*L_r = 1.81715 mH
# 7.原副边电流计算：
# 计算原边电流最大值与有效值（额定点）：
I_pRms := π*I_out/(2*sqrt(2)*N_ps) = 1.21302 A
# 计算变压器激磁电流：
I_mRms := 2*sqrt(2)/π*N_ps*V_oNom/(2*π*f_r*L_m) = 0.57763 A
# 计算谐振电流有效值和峰值（额定点）：
I_rRms := sqrt(I_pRms^2 + I_pRms^2) = 1.71547 A
I_rPeak := sqrt(2)*I_rRms = 2.42605 A
# 计算变压器副边电流：
I_sRms := N_ps*I_pRms/2 = 5.5536 A
# 二、LLC变压器设计与计算：
# 根据功率与电压等级经验选用PQ3535设计LLC变压器（也可以用AP法选取其他对应的磁芯）：
# 1.PQ3535磁心相关参数如下：
# 磁心Ae值：
A_e := 196*mm^2
# 磁心体积Ve值：
V_e := 19260 mm^3
# 磁心平均绕线长度：
l_e := 87.9 mm
# 磁心窗口面积：
A_w := 220 mm^2
# 2.PQ3535磁心计算：
# 定义变压器工作最大Bmax为：
B_max := 0.126 T
# 计算变压器原边匝数：
n_p := round(V_oNom*N_ps*1/(f_r*4)/(B_max*A_e)) = 74
# 计算变压器副边匝数：
n_s := round(n_p/N_ps) = 8
# 计算变压器额定工作点的B：
B := V_oNom*n_p/n_s*1/(f_r*4)/(n_p*A_e) = 0.127551 T
# 计算额定工作变压器的磁芯损耗：
P_TC := 7.629*10^-8*(0.17*10^3)^2.52072*(f_r/kHz)^1.87872*10^3*V_e*10^-9/mm^3*2 = 1.91593
# 验证当输出最高电压时，变压器的B值：
# 当输入380V，输出48V时，从增益图上可以看出工作大致在38kHz,则此时的B值为
B_max48V := V_oMax*n_p/n_s*1/(38 kHz*4)/(n_p*A_e) = 0.201396 T
# 计算最恶劣下变压器的B值最大为0.2T,即整个工作范围内均满足要求：
# 3.绕组设计计算：
# 定义变压器原副边绕组工作电流密度：
# 原边绕组电流密度：
I_pDen := 4*10^6*A
# 副边绕组电流密度：
I_sDen := 4*10^6*A
# 变压器原边采用0.1的多股励磁线绕制，计算励磁线股数：
NTp := ceil(I_pRms/(I_pDen*π*(0.1*10^-3)^2/4*50))*50 = 50
# 变压器副边采用50*0.1的励磁线绕制：
# 变压器副边采用0.1的多股励磁线绕制，计算励磁线股数：
NTs := ceil(I_sRms/(I_sDen*π*(0.1*10^-3)^2/4*50))*50 = 200
# 变压器副边采用200*0.1的励磁线绕制：
# 计算窗口占用率：
λ_w := π*(0.1 mm)^2/4*(NTp*n_p + NTs*n_s*2)/A_w = 24.6329 %
# 计算原边绕组直流内阻：
R_dcPri := 2.176*Ω/m/NTp*(l_e*n_p + 10 mm) = 0.283515 Ω
# 计算副边绕组直流内阻：
R_dcSri := 2.176*Ω/m/NTs*(l_e*n_s + 10 mm) = 0.00775962 Ω
# 定义绕组电流系数：
AC_pri := 2
AC_sec := 2
# 计算变压器绕组损耗：
P_TW := I_pRms^2*R_dcPri*AC_pri + I_sRms^2*R_dcSri*AC_sec*2 = 1.79165 W
# 4.变压器总体损耗计算：
P_T := (P_TC*W + P_TW) = 3.70758 W
# 三、LLC谐振电感设计与计算：
# 根据功率与电压等级经验选用PQ3230设计LLC谐振电感：
# 1.PQ3230磁心相关参数如下：
# 磁心Ae值：
A1_e := 161 mm^2
# 磁心体积Ve值：
V1_e := 11970 mm^3
# 磁心平均绕线长度：
l1_e := 74.6 mm
# 磁心窗口面积：
A1_W := 149.6 mm^2
# 2.PQ3230磁芯计算：
# 定义谐振电感工作最大B1max为：
B1_max := 0.12 T
# 计算电感绕组匝数：
n_c := ceil(L_r*I_rPeak/(B1_max*A1_e)) = 66
# 计算电感磁芯损耗：
P_LC := 7.629*10^-8*(0.2*10^3)^2.52072*(f_r/kHz)^1.87872*10^3*V1_e*10^-9/mm^3*2 = 1.79363
# 当输出为48V10A满载时，原边谐振电流峰值会比40V10A额定工作点大，留有余量，取满载下谐振电流峰值为150%I_rPeak，验证其最大电流时电感的B值
Bx_max := L_r*(150 %*I_rPeak)/(n_c*A1_e) = 0.177805 T
# 即最大工作电流时，电感B值满足要求：
# 3.电感绕组计算：
# 与变压器原边绕组一样，电感采用0.1的多股励磁线绕制，计算励磁线股数：
NTs_L_r := NTp = 50
# 采用0.1*50的多股励磁线绕制：
# 计算窗口占用率：
λ_w1 := π*(0.1 mm)^2/4*NTs_L_r*n_c/A1_W = 17.325 %
# 计算电感绕组直流内阻：
R_dc_r := 2.176*Ω/m/NTs_L_r*(l1_e*n_c + 10 mm) = 0.21471 Ω
# 定义绕组电流系数：
AC_r := 2
# 计算变电感绕组损耗：
P_LW := I_rRms^2*R_dc_r*AC_r = 1.26372 W
# 4.电感总体损耗计算：
P_L := (P_LW + P_LC*W) = 3.05735 W
# 四、MOS选型计算：
# 计算单颗mos的最大电流为谐振电流的最大电流值
I_mosMax := I_rPeak = 2.42605 A
# Mos选型的额定电流值需按流过MOS最大电流的1.5倍余量以上（防止短路或故障下电流过大冲击损坏），还要综合考虑mos的导通内阻
I_mosMax*1.5 = 3.63907 A
# Mos选型的额定耐压值需大于最大电压输入时的耐压值1.3倍余量（防止尖峰击穿）
V_bus*1.3 = 494 V
# 可以选用和PFC相同的MOS型号STW24NM60N。
# 根据所选型的MOS，查阅DATASHEET规格书，获取其恶劣情况下的导通电阻值：
# 定义MOS导通电阻值：
R_DS_on := 0.2 Ω
# 计算MOS总共导通损耗：
P_MOS_C := (I_rRms/2)^2*R_DS_on = 0.147143 W
# 在重载情况下为软开关模式，可以忽略开通损耗
# 五、副边二极管选型计算：
# 根据输出电压和电流范围确定副边比较合适整流方式为中心抽头全波整流
# 计算输出最大电流值：
I_dioAvg := P_oNom/(2*V_oNom) = 5 A
I_dioAvg*1.5 = 7.5 A
# 二极管截止时，其承受输出两倍的电压,选型确定耐压值1.5倍余量（防止尖峰击穿）
V_dioRate := 1.5*2*V_oMax = 144 V
# 即可选型额定通电能力在11A以上，耐压200的快恢二极管。
# 定义二极管导通管压降
V_F := 0.75 V
# 计算二极管导通损耗
P_DIO_C := I_dioAvg*V_F = 3.75 W
# 根据上述的计算和分析，选择副边二极管的型号为VS-MUR3020WT-N3，反向击穿电压为200V，而定平均电流为30A
# 六、LLC输出电容计算：
# 定义额定工况下输出电压纹波为：
V_or := 0.5 %*V_oNom = 0.2 V
# 计算副边整流电流峰值：
I_opeak := π/2*I_out = 15.708 A
# 计算副边整流电流有效值：
I_orms := 1/sqrt(2)*I_opeak = 11.1072 A
# 计算电容电流有效值：
I_crms := sqrt(I_orms^2 - I_out^2) = 4.83426 A
# 计算总电容ESR值：
R_ESR := V_or/I_crms = 0.0413714 Ω
# 计算总电容值：
C_out := 60*10^-6*F*Ω/R_ESR = 0.00145028 F
# 输出采用470uF的电容，计算总电容颗数：
N_cout := round(C_out/(470*10^-6*F)) = 3
# 留有一定余量，输出采用6颗电容：
