# 《LPD04810-PFC主功率计算》
# By淘宝：文七电源
# 地址：https://shop227154945.taobao.com
# 说明：本设计书说明LPD04810电源PFC主功率硬件计算
# 定义模块相关参数：
# 定义整机运行额定功率:
P_out := 500 W
# 定义母线额定电压值：
V_bus := 380 V
# 定义交流输入额定、最小、最大电压：
V_acnom := 220 V
V_acmax := 253 V
V_acmin := 176 V
# 定义PFC设计目标效率：
η := 95 %
# 定义PFC功率因素值：
PF := 0.99
# 定义PFC开关频率：
f_s := 45 kHz
# PFC运行相关参数计算：
# 计算PFC输出电流额定值:
I_bus := P_out/V_bus = 1.31579 A
# 计算PFC输入功率值:
P_in := P_out/η = 526.316 W
# 计算AC电压最低电压峰值:
V_acMinPeak := sqrt(2)*V_acmin = 248.902 V
# 当输入电压最小且输出满载功率时，输入电流最大(有效值)
I_acMax := P_out/(η*PF*V_acmin) = 3.02064 A
# 计算输入电流最大值时的峰值与有效值（正弦）
I_acMaxPeak := sqrt(2)*I_acMax = 4.27183 A
I_acAvg := 2*I_acMaxPeak/π = 2.71953 A
# 整流桥选型计算：
# 输入电流交流电经流经整流桥整流，即流过整流桥最大的电流为输入AC的最大电流，取1.5倍余量，计算选型整流桥的额定电流值：
IK_B := 1.5
I_BriRate := IK_B*I_acAvg = 4.07929 A
# 整流桥某个二极管承受负向电压截止时，该二极管上承受的电压为PFC直流母线电压，选取整流桥电压应力余量参数为1.3，则计算得到需要选取整流桥器件的电压应力
VK_B := 1.3
V_BriRate := VK_B*V_bus = 494 V
# 计算整流桥最大损耗值：
# 计算整流桥导通时的管压降V_F为0.9V
V_BriF := 0.9 V
P_Bri := 2*V_BriF*I_acAvg/2 = 2.44758 W
# 综合上述，整流桥选型的平均电流应力需大于4.079A，电压应力需大于494V。设计中选用的整流桥型号为GBJ2506，该整流桥耐压能力600V，平均电流能力29A。
# PFC电感选型计算：
# 定义当输入电流最大时的PFC电感电流纹波与最大电流峰值的比值为纹波电流系数，取通常纹波电流系数选取在0.2~0.5之间，设计选取纹波系数为0.3
IK_Ripple := 0.3
# 计算电感的纹波电流为：
IL_Ripple := IK_Ripple*I_acMaxPeak = 1.28155 A
# 当输入电网最低电压峰值，输出电压为380V时，根据BOOST电路工作原理，计算得到此时的占空比为：
D_max := (V_bus - V_acMinPeak)/V_bus = 34.4996 %
# 电感电流最大值：
IL_Max := I_acMaxPeak + IL_Ripple/2 = 4.9126 A
# 根据BOOST电路工作原理，PFC电感，输入电压，占空比，纹波电流，频率满足以下关系，计算得到PFC电感为
L_PFC := V_acMinPeak/IL_Ripple*1/f_s*D_max = 1.489 mH
# 选取电感电流密度为4，计算电感绕线的直径：
D := 2*sqrt(I_acMax/(4 A*π)) = 0.98056
# 选用1.0的线
# 二极管选型计算：
# 二极管的峰值电流等于电感的峰值电流，选取二极管峰值电流应力余量参数为1.5
IK_D := 1.5
I_DioMax := IL_Max*IK_D = 7.3689 A
# 根据母线电压可估算得到二极管的平均电流为
I_dioAvg := P_out/V_bus = 1.31579 A
I_dioRate := I_dioAvg*IK_D = 1.97368 A
# 选取电压应力余量参数为1.5
VK_D := 1.5
V_DioMax := 1.5*V_bus = 570 V
# 设计选型的PFC二极管型号为SDUR3060W，该二极管的反向击穿电压为600V，
# 平均电流能力30A，满足设计要求。
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# 定义二极管管压降（从datasheet上可得）
V_DioF := 1.7 V
# 定义二极管反向恢复电荷（从datasheet上可得）
Q_RR := 210*nC
# 计算二极管导通损耗（近似平均值计算）
P_DioC := V_DioF*P_out/V_bus = 2.23684 W
# 计算二极管反向恢复损耗
P_DioR := V_bus*Q_RR*70*%*f_s*2 = 5.0274 W
# 计算二极管总体损耗：
P_Dio := P_DioC + P_DioR = 7.26424 W
# MOS选型计算：
# PFC电路中的MOS器件峰值电流等于电感的峰值电流，其峰值电流余量参数选择与二极管相同
# MOS导通电流有效值可以近似等于:
I_MOS_rms := I_acMax*(D_max + 1)/2 = 2.03137 A
# 其电压应力选取与二极管相同。
# 设计选型的PFC电路MOS型号为STW24NM60N，该MOS的击穿电压为600V，有效值导通电流为18A
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# 定义MOS导通电阻（从datasheet上可得）
R_MOS := 0.2 Ω
# 计算mos导通损耗
P_mos_con := I_MOS_rms^2*R_MOS = 0.825294 W
# 定义MOS驱动上升、下降时间，COSS容量：
t_r := 200 ns
Coss := 56*pF
# 计算mos开关损耗：
P_mos_s := t_r*V_bus*I_acMaxPeak/2*f_s + Coss*V_bus^2*f_s = 7.66871 W
# 计算mos总损耗：
P_mos := P_mos_con + P_mos_s = 8.494 W
# 输出电容容量计算：
# 定义掉电保持最低电压值：
V_busHold := 200 V
# 定义掉电最小时间：
t_busHold := 20 ms
# 计算最小电容量：
C_bus := 2*P_out*t_busHold/(V_bus^2 - V_busHold^2) = 0.000191571 F
# 本设计使用两颗120uF的母线电容
# 事实上，PFC母线电容容量大小的应用没统一计算公式，根据实际应用场合选择合适的电容大小，当电容容量较小，母线纹波越大，为了保证后级DC-DC输出较稳定的电压，DC-DC侧的控制带宽和相应就要求越快，同时输入掉电后输出掉电的时间间隔就越短；反之，母线电容越大，母线电压越平滑，后级DC-DC控制压力较小，输入调电后输出保持时间较长。常规应用场合情况下对于普通应用场合，通常按照1kW配置200uF的母线电容经验设计。
# EMI及保护电路计算：
# 输入保险丝选型原则为PFC工作最大电流平均值的1.5~2倍余量，取余量1.5倍,计算选型保险丝的额定电流值:
IK_Fuse := 1.5
I_FuseRate := IK_Fuse*I_acMax = 4.53096 A
# 即理想保险丝选5A，耐压大于253VAC的保险丝
# 通常情况输入电压纹波系数取0.05~0.08（代表输入电压纹波包络线）
VK_Ripple := 0.02
# 计算输入电压纹波值：
Vac_Ripple := VK_Ripple*V_acMinPeak = 4.97803 V
# 计算输入X电容容量：
C_x := IL_Ripple/(8*f_s*Vac_Ripple) = 7.15113e-7 F
# 设计留有一定的余量，同时满足输入电压的要求，选用两颗1uF/275VAC的X2电容作为输入滤波电容
# 压敏电压值应大于实际电路的电压值，一般应使用下式进行选择
VmA := a*v/(b*c)  # disabled
# a为电路电压波动系数，一般取值1.2，b为压敏电阻误差，一般取值0.85，c为元件的老化系数，一般取值0.9，v为交流输入正常最大电压有效值，在交流电应用场合为峰值电压，取253V的1.414倍
a := 1.2
b := 0.85
c := 0.9
v := 253*1.414
VmA := a*v/(b*c) = 561.164
# 查询相关手册可以选用10D561K型号压敏电阻，其压敏电压范围为504V~616V
# By淘宝：文七电源
#
# 地址：https://shop227154945.taobao.com
