# 《LPD04810-LLC源代码计算书》
# 淘宝：文七电源
# 地址：https://shop227154945.taobao.com
# 说明：本设计书说明LPD04810电源LLC软件参数计算内容，所计算数据均用以代码编写数据来源
# 常规数字量定义：
Q8 := 2^8
Q10 := 2^10
Q12 := 2^12
Q13 := 2^13
Q14 := 2^14
Q15 := 2^15
Q16 := 2^16
# LLC工作整体参数定义：
# 定义LLC的输出最高电压，最低电压为：
V_oMax := 48 V
V_oMin := 24 V
# 定义LLC的输出最大电流为：
I_oMax := 10 A
# 定义LLC的工作开关频率的谐振频率，最高频率，最低频率为：
f_r := 50 kHz
f_sMax := 150 kHz
f_sMin := 35 kHz
# 定义控制器的主频为：
f_DSP := 60 MHz
# PWM为上升下降方式，则谐振频率，最低频率，最高频率对应的开关周期数字量为：
Period_r := f_DSP/(f_r*2) = 600
Max_Period := f_DSP/(f_sMin*2) = 857.143
Min_Period := f_DSP/(f_sMax*2) = 200
# 可以构建不同开关频率对应开关周期的数字量函数为：
Period(f) := f_DSP/(f*2)
# 举例，当频率为*kHz时，对应的开关周期数字量为：
Period(100 kHz) = 300
# 输出电压转换计算：
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# 定义输出电压取样电压分别为：
RA_70 := 68 kΩ
RA_72 := 3.3 kΩ
# 定义DSP能够采集到的最高电压为：
V_dsp := 3.3 V
# 根据分压原理可知，DSP能够采集到输出的最高电压为：
V_oMaxS := V_dsp*(RA_70 + RA_72)/RA_72 = 71.3 V
# 以Q15表示输出电压，则输出电压数字量函数为：
V_oDsp(V_o) := V_o/V_oMaxS*Q15
# 举例说明，当输出电压为*V时，对应的数字量为：
V_oDsp(40 V) = 18383.2
# 输出电流转换计算：
# 设计使用运放的1通道构建零偏置电压，定义偏置电路的电阻参数为
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RA_56 := 3.3*kΩ
RA_58 := 1*kΩ
# 计算偏置电压为：
V_offset := RA_58/(RA_58 + RA_56)*3.3*V = 0.767442 V
# 定义输出电流取样电阻为
RA_42 := 0.001 Ω
# 定义输出电流差分放大电路的电阻为：
RA_59 := 15*kΩ
RA_60 := 100*Ω
# 则差分电流变换的运放增益为
GAIN := RA_59/RA_60 = 150
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# 根据差分变换电路增益，采样电阻，和DSP标定电压3.3V，则计算输出电流最大采样值为
I_oMaxS := V_dsp/(GAIN*RA_42) = 22 A
# 定义Q15数据为DSP最大量程电压数字量，对应3.3V，则得到输出电流对应的数字量函数为：
I_oDsp(I_o) := I_o/I_oMaxS*Q15
# 举例说明，输出电流为*A，则对应DSP内部的数字量为：
I_oDsp(5 A) = 7447.27
# 电压环PI参数计算： void VLoopCtlPI(void)
# LLC调节对应的最低开关频率为35kH，最高频率为150kHz，则环路输出的上下限为：
MIN_LOOPOUT := Period(150 kHz) = 200
MAX_LOOPOUT := Period(35 kHz) = 857.143
# 对应的积分量上下限制为：
MAX_INTE := MAX_LOOPOUT*Q15 = 28086857
MIN_INTE := MIN_LOOPOUT*Q15 = 6553600
# 电压参考值： void VrefGet(void)
# 定义最低输出电压为24V，留0.5V余量，则最低输出电压：
MIN_VREF := V_oDsp(23.5 V) = 10800.1
# 定义最高输出电压为48V，留0.5V余量，则最高输出电压：
MAX_VREF := V_oDsp(48.5 V) = 22289.6
# 电流参考值： void IrefGet(void)
# 定义最低输出电压为0A
MIN_IREF := 0
# 定义最高输出电流为10A，则：
MAX_IREF := I_oDsp(10 A) = 14894.5
# 启动状态机：void StateMRise(void)
# 定义LLC谐振电流过流保护点：
I_priOcp := 6.5 A
# 使用的CT互感器参数：
N_CT := 1/300
# CT转换后的转换电阻为：
RA_57 := 100 Ω
# 根据DSP可以识别的最高电压3.3V，可推算出DSP可识别的最大过流值：
I_priMax := V_dsp/(RA_57*N_CT) = 9.9 A
# 构建过流保护点数字量函数为：
I_priOcpDsp(I_pri) := I_priOcp/I_priMax*Q10
# 举例，当过流保护点位*A，则对应的数字量为：
I_priOcpDsp(I_priOcp) = 672.323
# 输出过流保护：void SwOCP(void)
# 定义过流保护点为输出最大电流的120%：
I_oOcp := I_oMax*120*% = 12 A
# 则对应的数字量为：
I_oOcpDsp := I_oDsp(I_oOcp) = 17873.5
# 输出过压保护： void SwOVP(void)
# 定义输出过压保护点为最高电压的105%：
V_oOvp := V_oMax*105*% = 50.4 V
# 则对应的数字量为：
V_oOvpDsp := V_oDsp(V_oOvp) = 23162.8
# 输出软件欠压保护：void SwUVP(void)
# 定义输出过压保护点为最低电压的90%：
V_oUvp := V_oMin*90*% = 21.6 V
# 则对应的数字量为：
V_oUvpDsp := V_oDsp(V_oUvp) = 9926.91
# 输出短路保护计算：void ShortOff(void)
# 定义输出短路保护的电压为最低电压的10%和最大电流的150%为：
V_Short := V_oMin*10*% = 2.4 V
I_Short := I_oMax*150*% = 15 A
# 则对应的数字量为：
V_ShortDsp := V_oDsp(V_Short) = 1102.99
I_ShortDsp := I_oDsp(I_Short) = 22341.8
# OLED电压电流显示：void OLEDShow(void)
# OLED显示带两位小时的实际电流值，即需要将电压和电流的数字量转换成实际量并放大100倍后显示：
# 输出电压显示的放大系数为：
3.3*(RA_70 + RA_72)/RA_72*100 = 7130
# 输出电流显示的放大系数为：
3.3*Ω/(GAIN*RA_42)*100 = 2200
# CAN通信显示：void CanRecord(void) | 0
# CAN通信显示和OLED显示原理一样，也要将数字量转换成实际值，并放大100倍：
# 电压电流转换系数如上节计算
# CAN设置命令转换：unsigned char SetCmdUpdate(void)
# CAN下发的电压命令为放大100倍，如下发48V命令，则下发的数值为4800：
#
# 计算电压对应的转换系数，并放大Q10
Q15*Q10/(3.3*(RA_70 + RA_72)/RA_72*100) = 4706.09
# CAN下发的电流命令为放大100倍，如下发5A命令，则下发的数值为500：
#
# 计算对应的转换系数，并放大Q10
Q15*Q8/(3.3*Ω/(GAIN*RA_42)*100) = 3813
