# 《LPD04810-PFC源代码计算书》
# 淘宝：文七电源设计
# 地址：https://shop227154945.taobao.com
# 说明：本设计书说明LPD04810电源PFC软件参数计算内容，所计算数据均用以代码编写数据来源
# 常规数字量定义：
Q10 := 2^10
Q12 := 2^12
Q13 := 2^13
Q14 := 2^14
Q15 := 2^15
Q16 := 2^16
# PFC工作整体参数定义：
# 交流输入最低，额定，最高有效值：
V_acmin := 187*V
V_acnom := 220*V
V_acmax := 253*V
# 定义PFC工作开关频率为：
f_s := 45 kHz
# PFC电感为：
L_PFC := 1.5 mH
# 电网最小，额定，最大频率：
f_lmin := 45*Hz
f_lnom := 50 Hz
f_lmax := 70*Hz
# 额定母线电压：
V_bus := 380 V
# 交流电网电压采样：
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# 根据电路原理图定义数据交流电压采样电阻分别为：
RA_30 := 243 kΩ
RA31 := 243 kΩ
RA_33 := 3.3*kΩ
# DSP能够采样到的最高ADC口电压为：
V_dsp := 3.3 V
# 根据分压原理反推出DSP能够采样到的输入最高电压为：
V_ACL_max := V_dsp*(RA_30 + RA31 + RA_33)/RA_33 = 489.3 V
# 输入交流电压的N线和L线对PGND的输入最高电压为：
V_ACN_max := V_ACL_max = 489.3 V
# 定义Q15数据为DSP最大量程电压数字量，对应3.3V，则得到输入电压L线或者N线对应的数字量函数为：
V_ACdsp(V_ac) := V_ac/V_ACL_max*Q15
# 举例说明，输入L线或者N线对PGND的电压为*V，则对应DSP内部的数字量为：：
V_ACdsp(220*V) = 14733.2
# MOS电流采样：
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# MOS电流经0.01Ω的取样电阻转换成与电流同样比例电压信号，再径差分放大将其转换成适合DSP采样的电压信号。
# 设计使用运放的1通道构建零偏置电压，定义偏置电路的电阻参数为
RA_15 := 4.7*kΩ
RA_29 := 1*kΩ
# 计算偏置电压为
V_offset := RA_29/(RA_29 + RA_15)*5*V = 0.877193 V
# 定义MOS电流采样电阻为
RA_13 := 0.01 Ω
# 定义MOS电流差分放大电路的电阻为
RA_22 := 2.2*kΩ
RA_23 := 100*Ω
# 则差分电流变换的运放增益为
GAIN := RA_22/RA_23 = 22
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# 根据差分变换电路增益，采样电阻，和DSP标定电压3.3V，则计算MOS电流最大采样值为
I_Lmax := V_dsp/(GAIN*RA_13) = 15 A
# 定义Q15数据为DSP最大量程电压数字量，对应3.3V，则得到MOS电流对应的数字量函数为：
I_Ldsp(I_L) := I_L/I_Lmax*Q15
# 举例说明，MOS电流为*A，则对应DSP内部的数字量为：
I_Ldsp(0.15*A) = 327.68
# 母线电压采样：
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# 根据电路原理图定义数据交流电压采样电阻分别为：
RA_17 := 243 kΩ
RA_18 := 243 kΩ
RA_21 := 3.3 kΩ
# 根据分压原理反推出DSP能够采样到的BUS最高电压为：
V_bus_max := V_dsp*(RA_17 + RA_18 + RA_21)/RA_21 = 489.3 V
# 定义Q15数据为DSP最大量程电压数字量，对应3.3V，则得母线电压对应的数字量函数为：
V_BUSdsp(V_bus) := V_bus/V_bus_max*Q15
# 举例说明，母线电压为*V，则对应DSP内部的数字量为：
V_BUSdsp(380*V) = 25448.3
# 交流电压锁相环计算
# 软件自定义的半正弦表数据为1024个，即正弦表长度为1024：
PLL_num := 1024
# 以工频50Hz为例说明，若锁相环计算频率为45kHz（开关周期，单周期计算），即在半个工频周期内总共可以计算450次：
N_T := f_s/(2*f_lnom) = 450
# 基于正弦数据表的长度为1024个点，则每次从表中取数step为2.276个间隔。
PLL_step := PLL_num/N_T = 2.27556
# 2.276个间隔非整数，使用Q12将其放大。
PLL_step_dsp := PLL_step*Q12 = 9320.68
# 由锁相环的工作原理可知，在不同的输入电网频率下对应的锁相环计算步长不一样：
PLL_step_dsp_max := PLL_num/(f_s/(2*f_lmax))*Q12 = 13048.9
PLL_step_dsp_min := PLL_num/(f_s/(2*f_lmin))*Q12 = 8388.61
# 该步长限制参数在锁相环函数void PhaseLockLoop(void)中使用
# 交流电压电流有效值计算：
# 根据平均值计算原理，假设采样数据为X1..Xn总共n个数据，则平均值M为：
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# 根据输入电压和输入电流呈现正弦波的特性，正弦半波的平均值至有效值之间存在固定的比例：
# 该比例系数放大Q14倍为：
K_AVGtoRMS := π/(2*sqrt(2))*Q14 = 18198
# 软件在45kHz的ADC采样中断（锁相环函数中）对输入电压和输入电流进行累加求和，并计数n
# 针对不同的输入频率，累加的n值不同，计算最小和最大输入电压频率对应的n倒数值：
Cnt_min := round(2*f_lmin/f_s*Q16) = 131
Cnt_max := round(2*f_lmax/f_s*Q16) = 204
# 前馈计算验证
# 计算输入电压的峰值和假定输入电流：
V_acpeak := V_acnom*sqrt(2) = 311.127 V
I_ac := 1 A
# 计算输入功率：
P_in := V_acnom*I_ac = 220 W
# 构建输入正弦电压半边函数：
V_in(t) := |V_acpeak*sin(2*π*f_lnom/Hz*t)|
# 绘制半边正弦电压图：
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# 根据Boost电路工作原理，计算假设工作于CCM模式对应的CCM占空比：
D_ccm(t) := 1 - V_in(t)/V_bus
# 根据Boost电路工作于DCM状态下时计算对应的DCM工作占空比为：
D_dcm(t) := sqrt(4*L_PFC*f_s)*1/V_acpeak*sqrt(P_in)*sqrt(D_ccm(t))
# 取两者的最小值作为系统控制的前馈占空比：
Feed(t) := min(D_ccm(t), D_dcm(t))
# 分别绘制BOOST电路工作CCM占空比，DCM占空比，与两者最小值图：
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# 上述计算为参数均为实际参数，下面对应的DSP内部对应的数字量计算验证过程
# 选取tt时刻，计算对应此时对应的输入电压
tt := 0.0003
V_ine := V_in(tt) = 29.2796 V
# 计算此时的CCM模式下占空比
D_ccm(tt) = 92.2948 %
# Q15对应的占空比为100%，则换算占空比的数字量
D_dspccm := D_ccm(tt)*Q15 = 30243.2
# 对应此时的DCM占空比为：
D_dcm(tt) = 75.2565 %
D_dspdcm := D_dcm(tt)*Q15 = 24660.1
# 上面所有计算均基于实际值计算，下面推导如何通过DSP采样值计算：
# 原始计算公式为（参数为实际值）：
D_dcm(t) := sqrt(4*L_PFC*f_s)*1/V_acpeak*sqrt(P_in)*sqrt(D_ccm(t))  # disabled
# 使用DSP数字量表示：
D_dcm(t)*Q15 := sqrt(4*L_PFC*f_s)*Q15/(V_acpeakdsp*V_acmax)*sqrt(V_acrmsdsp/Q15*V_acmax)*sqrt(I_acrmsdsp/Q15*I_acmax)*sqrt(D_ccmdsp(t)*Q15)  # disabled
# 化简得到：
D_dcm(t)*Q15 := sqrt(4*L_PFC*f_s*I_acmax/V_acmax)*1/V_acpeakdsp*sqrt(V_acrmsdsp)*sqrt(I_acrmsdsp)*sqrt(D_ccmdsp(t)*Q15)  # disabled
D_dcmdsp(t) := K*1/V_acpeakdsp*sqrt(V_acrmsdsp)*sqrt(I_acrmsdsp)*sqrt(D_ccmdsp(t))*sqrt(Q15)  # disabled
# 代入对应的参数得到：
sqrt(4*L_PFC*f_s*I_Lmax/V_ACL_max)*1/V_ACdsp(V_acpeak)*sqrt(V_ACdsp(V_acnom))*sqrt(I_Ldsp(I_ac))*sqrt(D_dspccm)*sqrt(Q15) = 24660.1
# 在实际应用过程DSP计算中，使用根号运算占用时间资源较多，为避免时间资源太大，使用根号查表法获得对应的数据：
# 将上述计算DCM占空比数字量的公式表示为：
D_dcmdsp(t) := K*Q15*Q15/V_acpeakdsp*sqrt(V_acrmsdsp*I_acrmsdsp/(Q15*Q15))*sqrt(D_ccmdsp(t)/Q15)  # disabled
# 根号查表法计算CCM占空比开根号Q15：
round(D_dspccm/2^5) = 945
SqrtDccm := 31462
# 根号查表法计算电压开根号Q15：
round(V_ACdsp(V_acnom)/2^5) = 460
SqrtV := 21938
# 根号查表法计算电流开根号Q15：
round(I_Ldsp(I_ac)/2^5) = 68
SqrtI := 8382
# 根号查表法计算功率开根号Q15：
SqrtP := SqrtV*SqrtI/Q15 = 5611.7
# 计算峰值电压倒数：
V_dspacpeak := V_ACdsp(V_acpeak) = 20835.9
Vpeakover := Q15/V_dspacpeak*Q15 = 51533.2
# 计算公式的K值，并放大Q10倍，最终结果要除以Q10倍：
DCM_FEED_COEFF := sqrt(4*L_PFC*f_s*I_Lmax/V_ACL_max)*Q10 = 2946.05
# 根据上述公式计算得到DCM占空比：
D_dcmcal := DCM_FEED_COEFF*Vpeakover*SqrtP*SqrtDccm/(Q15*Q15)/Q10 = 24378.6
# 其结果与理论结果相近
# 相关保护参数计算：
# 母线电压限制void VbusLimit(void)
# 定义限制的最高电压为：
V_BUSovp := 430 V
# 计算对应数字量：
V_BUSovpdsp := V_BUSdsp(V_BUSovp) = 28796.7
# 定义恢复电压为：
V_BUSovpre := 400 V
# 计算对应数字量：
V_BUSovpredsp := V_BUSdsp(V_BUSovpre) = 26787.7
# 输入电压检测与保护void VacCheck(void)
# 定义滞环电压为15V：
V_acReOffset := 15 V
# 输入过压保护对应的数字量：
V_acOvpDsp := V_ACdsp(V_acmax) = 16943.2
# 输入过压保护恢复对应的数字量：
V_acOvpReDsp := V_ACdsp(V_acmax - V_acReOffset) = 15938.7
# 输入欠压保护对应的数字量：
V_acUvpDsp := V_ACdsp(V_acmin) = 12523.2
# 输入欠压保护恢复对应的数字量：
V_acUvpReDsp := V_ACdsp(V_acmin + V_acReOffset) = 13527.8
# MOS电流保护void VacCheck(void)
# 定义假设电源的LLC效率，PFC效率,PFC的PF值如下：
η_LLC := 98 %
η_PFC := 98 %
PF := 0.99
# 定义输出满载的情况下，并计算对应的输入功率：
P_out := 500 W
P_ac := P_out/(η_PFC*η_LLC*PF) = 525.875 W
# 当输入电压最低时，对应的输入电流最大为：
I_acMax := P_ac/V_acmin = 2.81217 A
# 按正弦电流波形计算对应的峰值电流：
I_acMaxPeak := I_acMax*sqrt(2) = 3.977 A
# 当输入电压最高输出380V时，计算对应的占空比：
D_min := 1 - V_acmin*sqrt(2)/V_bus = 0.304058
# 在该占空比下占空比，电感电流的脉动为：
I_Delta := V_acmin*sqrt(2)/L_PFC*D_min*1/f_s = 1.19127 A
# 因此，电感电流的平均值加上二分之一的电流脉动即得到电感电流的峰值电流：
I_LMaxPeak := I_acMaxPeak + I_Delta/2 = 4.57264 A
# 保护点留有一定的余量，取155%的余量作为过流保护点：
I_Ocp := I_LMaxPeak*200*% = 9.14528 A
# 根据MOS电流取样电阻，电流差分转换电路增益和偏置计算峰值电流对应的转换电压：
V_Ocp := I_Ocp*RA_13*RA_22/RA_23 + V_offset = 2.88915 V
# 因此计算得到过流保护点DSP内部比较器的DAC数字量：
V_OCP_COMP := V_Ocp/V_dsp*Q10 = 896.513
# BUS电压欠压保护oid VbusUVP(void)
# 当检测到BUS电压小于输入电压有效值减去50V时，则判定欠压保护：
VBUS_UVP_OFFSET := V_BUSdsp(50 V) = 3348.46
# 其他参数计算：
# CCM前馈计算void FeedCal(void)
# 对于CCM而言，其计算公式为，其中Vac为实际输入电压，Vbus为固定的母线电压380V：
DutyCCM := 1 - V_ac/V_bus  # disabled
# 将其换算为，即得到CCM前馈的数字量计算：
DutyCCM*Q15 := Q15 - V_ac*Q15/V_bus  # disabled
# 全部使用数字量的方式表示为：
DutyCCM*Q15 := Q15 - V_acdsp/Q15*V_acmax*Q15/(V_busdsp/Q15*V_busmax)  # disabled
# 将其化简为：
DutyCCM*Q15 := Q15 - V_acdsp*V_acmax*Q15/(V_busdsp*V_busmax)  # disabled
# 计算其中的固定的参数为：
VBUS_OVER := V_ACL_max*Q15/(V_BUSdsp(380 V)*V_bus_max)*Q13 = 10548.3
# 则得到CCM前馈的计算方式数字量表示为：
Feed_ccm := Q15 - V_acdsp*VBUS_OVER  # disabled
# 最大参考电流限制：void IrefCal(void)
# 定义最大参考电流为5A，则其对应的数字量：
I_Ldsp(5*A) = 10922.7
# 电流环相关参数：void CurrentLoop(void)
# 定义电流环PI环的误差量最大限制为0.15A，则其数字量最大和最小为：
MAX_IERR := I_Ldsp(0.15*A) = 327.68
# 定义最大占空比为0.95：
MAX_DUTY := 0.95*Q15 = 31129.6
# PI电流环的输出占空比积分量最大最小为0.5，则积分量放大Q13为（PI参数放大Q13倍）：
MAX_ILOOP_IN := 0.5*Q15*Q13 = 134217728
# 电压环变增益：void VloopKpKiCal(void)
# 当负载变轻，BUS电压上升，当负载变重，BUS电压下降，
# 为了保证控制BUS电压快速恢复正常值，设置了电压环参数变增益
# 变增益为滞环方式，当电压上升或者下降达到特定值后，KP和KI参数变增益
# 当电压恢复到一定值后，KP和KI参数变增益恢复正常
# 变增益点位偏离380V正常点30V：
V_OFFSET := V_BUSdsp(30 V) = 2009.07
# 变增益恢复点位偏离380V正常点20V：
V_OFFSET_RE := V_BUSdsp(20 V) = 1339.38
# 参考电压计算：void VrefCal(void)
# 定义固定的母线参考电压位380V：
VBUS_REF := V_BUSdsp(380 V) = 25448.3
# 有效值计算函数：void VIacRmsCal(void)
# 定义正弦半波平均值至有效值计算参数为π/(2*sqrt(2))：
AVG_TO_RMS := π/(2*sqrt(2))*Q14 = 18198
# 定义正弦有效值至峰值系数：
RMS_TO_PEAK := sqrt(2)*Q14 = 23170.5
# DCM前馈计算：void DCMFeedCal(void)
# 小功率时屏蔽前馈功能，当功率到一定程度时加入：
# 定义50W加入前馈，25W退出前馈（滞环效果）：
MIN_POWER_RE := (50 W/(I_Lmax*V_ACN_max))*Q15*Q15 = 7314816
MIN_POWER := (25 W/(I_Lmax*V_ACN_max))*Q15*Q15 = 3657408
